# A script to initialise and equilibrate a quiescent Morse gel. Simulation parameters are
# set in the input file specifying the initial configuration. The input file is generated by a Python script.

# Temperature is set to 1 such that beta epsilon is then the morse well depth
variable run_temp equal 1
variable run_steps equal 1000000
variable dump_frames equal 100

variable dump_frequency equal ${run_steps}/${dump_frames}
variable thermo_frequency equal ${run_steps}/1000

units		lj
atom_style	sphere
atom_modify	map array

pair_style	hybrid/overlay morse 1.25 yukawa/colloid 0.9 3.0 dpd/tstat ${run_temp} ${run_temp} 3.0 34387
# Read particles and interactions from input file
read_data ${file_name}
# Set up the particle interactions
pair_coeff  * * yukawa/colloid 6.0
include coeffs.in
pair_modify	shift yes
comm_modify vel yes

# Minimise the energy of the particles since the starting configuration is overlapping
minimize 	1e-10 1e-10 3000 3000

# Switch to a triclinic box so we can later deform it
change_box all triclinic

# Set initial random particle velocities at T = 1.
velocity all create ${run_temp} 1234

# We assume box is cubic in the input file
variable L equal xhi-xlo
print "Box size $L"

timestep 0.001

# Set up variables for the thermodynamic output
variable varstep equal step
variable vartemp equal temp
variable varpress equal press
variable varetotal equal etotal

compute  msd all msd
compute  com all com

variable da equal (${d1}+${d2})/2
variable cut11 equal 1.25*${d1}
variable cut12 equal ${da}+${d1}/4
variable cut21 equal ${da}+${d2}/4
variable cut22 equal 1.25*${d2}
compute neighbors11 type1 coord/atom cutoff ${cut11} group type1
compute neighbors12 type1 coord/atom cutoff ${cut12} group type2
compute neighbors21 type2 coord/atom cutoff ${cut21} group type1
compute neighbors22 type2 coord/atom cutoff ${cut22} group type2
variable sc1 atom c_neighbors11+c_neighbors12
variable sc2 atom c_neighbors21+c_neighbors22
compute ac1 all reduce ave v_sc1
compute ac2 all reduce ave v_sc2

# Periodically output particle diameter and position data in the lammps atom format
dump        dumpatom all custom ${dump_frequency} time-*.dump id x y z radius
dump_modify	dumpatom sort id first yes

# Periodically output the mean square displacement
fix	msd all ave/time 1 1 ${thermo_frequency} c_msd[4] file msd.txt

# Periodically output the center of mass
fix com all ave/time 1 1 ${thermo_frequency} c_com[1] c_com[2] c_com[3] file com.txt

# Periodically output the coordination numbers
fix avgcoord all ave/time 1 1 ${thermo_frequency} c_ac1 c_ac2 file avgcoord.txt

# Periodically output the position, velocity, and forces for each atom
# fix pvf all ave/atom 1 1 ${thermo_frequency} x y z vx vy vz fx fy fz
# dump atompvf all custom ${thermo_frequency} pvf.txt id f_pvf[*]

# Periodically print out thermodynamic variables
fix thermo_print all print ${thermo_frequency} "${varstep} ${vartemp} ${varpress} ${varetotal}" file gel_equil_${run_steps}.thermo screen no
thermo ${thermo_frequency}
thermo_style custom step temp press pe

# Do gel equilibration in nve
fix equilibrate all nve/sphere
# Center of mass is not forced to be fixed
# fix nocomdrift all momentum ${thermo_frequency} linear 1 1 1
run ${run_steps}
unfix equilibrate

# Write out a restart file to input to a different script
write_restart equil_${run_steps}.restart
